D := 0.1683 m
ρ_steel := 7850 kg*m^-3
C_V := 14500 kN/m^(5/2)
wt := 12.7 mm
ρ_cont := 500 kg*m^-3
ν := 0.35
ν_steel := 0.3
ρ := 1025 kg*m^-3
C_L := 12500 kN/m^(5/2)
A(OD, ID) := π*(OD^2 - ID^2)/4
m(OD, ID, ρ) := A(OD, ID)*ρ
m_steel := m(D, D - 2*wt, ρ_steel) = 48.7341 kg/m
m_cont := A(D - 2*wt, 0 m)*ρ_cont = 8.01908 kg/m
m_tot := m_steel + m_cont = 56.7532 kg/m
ρ_s := m_tot/A(D, 0 m) = 2551.13 kg/m^3
K_V_d := C_V/(1 - ν)*(2/3*ρ_s/ρ + 1/3)*sqrt(D) = 18235487 Pa
K_L_d := C_L*(1 + ν)*(2/3*ρ_s/ρ + 1/3)*sqrt(D) = 13794517 Pa
